// SBML level 2 version 4

model combined()

  // Compartments:
  compartment default_compartment = 1;

  // Species:
  species A_m1 in default_compartment = 31.41686;
  species A_m2 in default_compartment = 12.0969;
  species A_m3 in default_compartment = 36.52208;
  species p_c1 in default_compartment = 28.03914;
  species A_p2 in default_compartment = 16.66227;
  species A_p_o in default_compartment = 36.52208;
  species B_m1 in default_compartment = 34.71605;
  species B_m2 in default_compartment = 21.47894;
  species B_m3 in default_compartment = 22.94391;
  species B_m4 in default_compartment = 18.54409;
  species p_c2 in default_compartment = 31.59791;
  species B_p2 in default_compartment = 47.15972;
  species B_p3 in default_compartment = 22.94391;
  species C_m1 in default_compartment = 31.41686;
  species C_m2 in default_compartment = 12.08387;
  species C_m3 in default_compartment = 36.53679;
  species C_p_i in default_compartment = 40.07342;
  species C_p2 in default_compartment = 16.64432;

  // Parameters:
  A_L1 = 0.0137;
  A_a_m1 = 17.3504;
  A_d_m1 = 0.5527;
  A_L2 = 0.0138;
  A_Vm_A1 = 16.4465;
  A_K_A1 = 0.5672;
  A_H1 = 1.6066;
  A_Vm_R1 = 13.7617;
  A_K_R1 = 0.7426;
  A_d_m2 = 0.7742;
  A_L3 = 0.0103;
  A_Vm_A2 = 10.7736;
  A_K_A2 = 0.7782;
  A_H2 = 0.75;
  A_Vm_R2 = 16.6646;
  A_K_R2 = 0.9843;
  A_d_m3 = 0.664;
  A_a_p1 = 0.5032;
  A_d_p1 = 0.3945;
  A_a_p2 = 0.6887;
  A_d_p2 = 0.5;
  A_a_p3 = 0.5;
  A_d_p3 = 0.5;
  B_L1 = 0.0108;
  B_a_m1 = 15.4309;
  B_d_m1 = 0.4448;
  B_L2 = 0.0086;
  B_a_m2 = 13.0957;
  B_d_m2 = 0.6101;
  B_L3 = 0.014;
  B_Vm_A1 = 12.3714;
  B_K_A1 = 0.7134;
  B_H1 = 0.9345;
  B_Vm_R1 = 7.7666;
  B_K_R1 = 0.6126;
  B_Vm_A2 = 14.0722;
  B_K_A2 = 0.5974;
  B_H2 = 1.1507;
  B_Vm_R2 = 19.3097;
  B_K_R2 = 0.1662;
  B_d_m3 = 0.4434;
  B_L4 = 0.0111;
  B_d_m4 = 0.4699;
  B_a_p1 = 0.343;
  B_d_p1 = 0.455;
  B_a_p2 = 0.5522;
  B_d_p2 = 0.2515;
  B_a_p3 = 0.5;
  B_d_p3 = 0.5;
  B_a_p4 = 0.5;
  B_d_p4 = 0.5;
  C_L1 = 0.0137;
  C_a_m1 = 17.3504;
  C_d_m1 = 0.5527;
  C_L2 = 0.0138;
  C_Vm_A1 = 16.4465;
  C_K_A1 = 0.5672;
  C_H1 = 1.6066;
  C_Vm_R1 = 13.7617;
  C_K_R1 = 0.7426;
  C_d_m2 = 0.7742;
  C_L3 = 0.0103;
  C_Vm_A2 = 10.7736;
  C_K_A2 = 0.7782;
  C_H2 = 0.75;
  C_Vm_R2 = 16.6646;
  C_K_R2 = 0.9843;
  C_d_m3 = 0.664;
  C_a_p1 = 0.5032;
  C_d_p1 = 0.3945;
  C_a_p2 = 0.6887;
  C_d_p2 = 0.5;
  C_a_p3 = 0.5;
  C_d_p3 = 0.5;
  A_N = 0.5875;
  A_AA = 0.9965;
  B_N = 0.9655;
  B_AA = 1.3902;
  C_N = 0.5875;
  C_AA = 0.9965;

  // Reactions:
  A_ts1: => A_m1; A_L1 + A_a_m1 - A_d_m1*A_m1;
  A_ts2: => A_m2; A_L2 + A_Vm_A1*(A_K_A1*p_c1^A_H1/(A_K_A1 + p_c1^A_H1)) + A_Vm_R1*(A_K_R1/(A_K_R1 + p_c1^A_H1)) - A_d_m2*A_m2;  // modifiers: p_c1
  A_ts3: => A_m3; A_L3 + A_Vm_A2*(A_K_A2*A_p2^A_H2/(A_K_A2 + A_p2^A_H2)) + A_Vm_R2*(A_K_R2/(A_K_R2 + A_p2^A_H2))*A_Vm_A1*(A_K_A1*p_c1^A_H1/(A_K_A1 + p_c1^A_H1)) + A_Vm_R1*(A_K_R1/(A_K_R1 + p_c1^A_H1)) - A_d_m3*A_m3;  // modifiers: p_c1, A_p2
  A_tl1: => p_c1; A_a_p1*A_m1 - A_d_p1*p_c1;  // modifiers: A_m1
  A_tl2: => A_p2; A_a_p2*A_m2 - A_d_p2*A_p2;  // modifiers: A_m2
  A_tl3: => A_p_o; A_a_p3*A_m3 - A_d_p3*A_p_o;  // modifiers: A_m3
  B_ts1: => B_m1; B_L1 + B_a_m1 - B_d_m1*B_m1;
  B_ts2: => B_m2; B_L2 + B_a_m2 - B_d_m2*B_m2;
  B_ts3: => B_m3; B_L3 + B_Vm_A1*(B_K_A1*p_c2^B_H1/(B_K_A1 + p_c2^B_H1)) + B_Vm_R1*(B_K_R1/(B_K_R1 + p_c2^B_H1))*B_Vm_A2*(B_K_A2*B_p2^B_H2/(B_K_A2 + B_p2^B_H2)) + B_Vm_R2*(B_K_R2/(B_K_R2 + B_p2^B_H2)) - B_d_m3*B_m3;  // modifiers: B_p2, p_c2
  B_ts4: => B_m4; B_L4 + B_Vm_A2*(B_K_A2*B_p2^B_H2/(B_K_A2 + B_p2^B_H2)) + B_Vm_R2*(B_K_R2/(B_K_R2 + B_p2^B_H2))*B_Vm_A2*(B_K_A2*B_p2^B_H2/(B_K_A2 + B_p2^B_H2)) + B_Vm_R2*(B_K_R2/(B_K_R2 + B_p2^B_H2)) - B_d_m4*B_m4;  // modifiers: B_p2
  B_tl1: => p_c2; B_a_p1*B_m1 - B_d_p1*p_c2;  // modifiers: B_m1
  B_tl2: => B_p2; B_a_p2*B_m2 - B_d_p2*B_p2;  // modifiers: B_m2
  B_tl3: => B_p3; B_a_p3*B_m3 - B_d_p3*B_p3;  // modifiers: B_m3
  B_tl4: => p_c1; B_a_p4*B_m4 - B_d_p4*p_c1;  // modifiers: B_m4
  C_ts1: => C_m1; C_L1 + C_a_m1 - C_d_m1*C_m1;
  C_ts2: => C_m2; C_L2 + C_Vm_A1*(C_K_A1*C_p_i^C_H1/(C_K_A1 + C_p_i^C_H1)) + C_Vm_R1*(C_K_R1/(C_K_R1 + C_p_i^C_H1)) - C_d_m2*C_m2;  // modifiers: C_p_i
  C_ts3: => C_m3; C_L3 + C_Vm_A2*(C_K_A2*C_p2^C_H2/(C_K_A2 + C_p2^C_H2)) + C_Vm_R2*(C_K_R2/(C_K_R2 + C_p2^C_H2))*C_Vm_A1*(C_K_A1*C_p_i^C_H1/(C_K_A1 + C_p_i^C_H1)) + C_Vm_R1*(C_K_R1/(C_K_R1 + C_p_i^C_H1)) - C_d_m3*C_m3;  // modifiers: C_p_i, C_p2
  C_tl1: => C_p_i; C_a_p1*C_m1 - C_d_p1*C_p_i;  // modifiers: C_m1
  C_tl2: => C_p2; C_a_p2*C_m2 - C_d_p2*C_p2;  // modifiers: C_m2
  C_tl3: => p_c2; C_a_p3*C_m3 - C_d_p3*p_c2;  // modifiers: C_m3
end
